Pm(t) := [cos(t), -sin(t); sin(t), cos(t)]
O2s := [12; 0]
O1 := [120; -125]
e1 := [1; 0]
O2(t) := Pm(-t)*O2s
O2O1(t) := O1 - O2(t)
d(t) := sqrt((O1[0] - O2(t)[0])^2 + (O1[1] - O2(t)[1])^2)
β(t) := acos(60/d(t))
γ(t) := acos(O2O1(t)[0]/sqrt(O2O1(t)[0]^2 + O2O1(t)[1]^2))
AB(t) := 60*tan(β(t))
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l1(t) := (acos(O1[0]/sqrt(O1[0]^2 + O1[1]^2)) + β(t) - γ(t))*30
l2(t) := AB(t)
l3(t) := 90*(-β(t) - γ(t) + t)
l(t) := l1(t) + l2(t) + l3(t)
y(t) := t*90 + l(0) + sin(t - 1.74)*14 + 14
l(0) = 3.15361
y(0) = 3.35354
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l(t)/22.3
YY(t) := Pm(t + 0.5)*([40; 0] + Pm(67*t/90)*[40; 0])
x := 0, 0.01 .. 200
PP(t) := O2(2)
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90*t/25.8
