Pm(t) := [cos(t), -sin(t); sin(t), cos(t)]
O2s := [12; 0]  # Центр большой окружности в начальный момент
O1 := [120; -125]  # Центр малой окружности
O2(t) := Pm(-t)*O2s  # Центр окружности в момент времени t
O2O1(t) := O1 - O2(t)  # Вектор между центрами окружностей
Kas2(t) := Pm(π/2)*O2O1(t)*90/|O2O1(t)| + O2(t)  # Координаты точки касания ремня к большой окружности
Kas1(t) := Pm(π/2)*O2O1(t)*30/|O2O1(t)| + O1  # Координаты точки касания ремня к малой окружности
d(t) := |Kas1(t) - Kas2(t)|  # Расстояние между точками касания
α(t) := acos(O1*(Kas1(t) - O1)/(|O1|*|Kas1(t) - O1|))  # Угол на малой окружности
P0 := Kas2(0)
# Начальная точка на большой окружности
P0 = [80.1018; 58.84]
P(t) := Pm(t)*P0  # Точка на большой окружности в момент t
β(t) := acos((Kas2(t) - O2(t))*(P(t) - O2(t))/(|Kas2(t) - O2(t)|*|P(t) - O2(t)|))
α(10) = 1.58562
β(10) = 2.59808
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l(t) := d(t) + |α(t)|*30 + β(t - π*trunc(t/π))*90 + β(π)*90*trunc(t/π)  # Длина наматываемого на большой круг ремня
l(2*π) - l(0) = 547.475
l(4*π) - l(2*π) = 547.475
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γ(t) := l(t)/30  # Угол поворота малого круга
e1 := [1; 0]
r := 24
# параметры крепления карандаша
e1 := [1; 0]
l2 := 200
l3 := 150
α1 := π/3
Pm1(t) := Pm(-t)*e1*r + O1
Pm0 := [-95; -(230 - 75) + 15]
Pm0 = [-95; -140]
Pm1Pm0(t) := Pm0 - Pm1(t)
Pm3(t) := Pm1(t) + Pm1Pm0(t)*l2/|Pm1Pm0(t)|
Pm3(0) = [-55.6073; -137.528]
Pp(t) := Pm(α1)*(-Pm1Pm0(t))*l3/|Pm1Pm0(t)| + Pm3(t)
Ppf(t) := Pm(t)*Pp(-γ(t))
x := 0, 0.01 .. 200
