B := [120; -(230 - 75 - 30)] = [120; -125]
A := [280 - 110 - 25; 50] = [145; 50]
R := 180
O(t) := [cos(t), -sin(t); sin(t), cos(t)]*[12; 0]
aob(t) := acos(((O(t)[0] - A[0])*(O(t)[0] - B[0]) + (O(t)[1] - A[1])*(O(t)[1] - B[1]))/(sqrt((O(t)[0] - A[0])^2 + (O(t)[1] - A[1])^2)*sqrt((O(t)[0] - B[0])^2 + (O(t)[1] - B[1])^2)))
a1(t) := acos(90/sqrt((O(t)[0] - A[0])^2 + (O(t)[1] - A[1])^2))
pp(t) := 90/sqrt((O(t)[0] - B[0])^2 + (O(t)[1] - B[1])^2)
a2(t) := acos(90/sqrt((O(t)[0] - B[0])^2 + (O(t)[1] - B[1])^2))
l(t) := 90*(2*π - a1(t) - a2(t) - aob(t))
7/4*π = 5.49779
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m(t) := sqrt((O(t)[0] - B[0])^2 + (O(t)[1] - B[1])^2)
mu(t) := (90 - 30)/m(t)
a4(t) := acos((O(t)[0] - B[0])/sqrt((O(t)[0] - B[0])^2 + (O(t)[1] - B[1])^2))
a3(t) := acos(mu(t)/90)
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π*60 = 188.496
