Pm(t) := [cos(t), -sin(t); sin(t), cos(t)]
O2 := [300 - 75; -60]
O1 := [300 - 75 - 175; -60]
PY := 300 - 15
cf := 88/71
P10 := [300 - 75 - 22; -60]
P1(t) := Pm(cf*t)*P10
f(x) := sqrt(x^2 + sin(x)^2)
g(x) := atan(sin(x)/x)
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g1(x) := x
f(x)
