Pm(t) := [cos(t), -sin(t); sin(t), cos(t)]
O1 := [100; 100]  # Центр рисующей окружности
R1 := 60
O2 := [0; 100]  # Центр движущейся окружности
R2 := 60
Kf := R1/R2
Rp := [200; 100]  # Положение правой части планки
Lp0 := [0; 1]  # Положение левой координаты планки в начальный момент времени
R2p := 30  # Расстояние от центра O1 до точки крепления крепежа планки
vv1 := [217 - 96; 218 - 142]
vv2 := [258 - 107; 220 - 142]
vv3 := [107 - 96; 0]
qq := |[258 - 96; 220 - 142]|
qq = 179.8
|vv1| = 142.888
acos((vv1[0]*vv3[0] + vv1[1]*vv3[1])/(|vv1|*|vv3|)) = 0.560825
acos((vv1[0]*vv2[0] + vv1[1]*vv2[1])/(|vv1|*|vv2|)) = 0.0840201
tan(acos((vv1[0]*vv2[0] + vv1[1]*vv2[1])/(|vv1|*|vv2|))) = 0.0842184
(vv1[0]*vv3[0] + vv1[1]*vv3[1])/(|vv1|*|vv3|) = 0.846817
sin(acos((vv1[0]*vv3[0] + vv1[1]*vv3[1])/(|vv1|*|vv3|))) = 0.531885
|qq| = 179.8
fd(x) := |qq|*sin(2*π*x/|qq|)/(2*π) + 0.084*x*2*π/|qq|  # Функция отклонения
r2(x) := (fd(x - 11*0.847) + 11*0.532)^2 + x^2
x1 := [0; 15; 50; 90; 120; 140; 180; 200]
r(x) := sqrt(r2(x))
y1 := [r(x1[0]); r(x1[1]); r(x1[2]); r(x1[3]); r(x1[4]); r(x1[5]); r(x1[6]); r(x1[7])]
y1 = [3.32861; 18.9098; 60.6171; 91.2658; 120.684; 141.73; 180.019; 200.724]
cc := polycoeff(y1, x1)
PP(x) := sum(cc[k]*x^k, k = 0 .. 7)
r(2*π) = 6.88494
atan(sin(r(2*π))/r(2*π)) = 0.0820371
PP(2*π) = 4.753
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cc = [-7.28031; 2.55141; -0.119359; 0.00310972; -3.80125e-5; 2.40425e-7; -7.63748e-10; 9.65361e-13]
O2s := [12; 0]  # Центр большой окружности в начальный момент
O1 := [120; -125]  # Центр малой окружности
O2(t) := Pm(-t)*O2s  # Центр окружности в момент времени t
O2O1(t) := O1 - O2(t)  # Вектор между центрами окружностей
Kas2(t) := Pm(π/2)*O2O1(t)*90/|O2O1(t)| + O2(t)  # Координаты точки касания ремня к большой окружности
Kas1(t) := Pm(π/2)*O2O1(t)*30/|O2O1(t)| + O1  # Координаты точки касания ремня к малой окружности
d(t) := |Kas1(t) - Kas2(t)|  # Расстояние между точками касания
α(t) := acos(O1*(Kas1(t) - O1)/(|O1|*|Kas1(t) - O1|))  # Угол на малой окружности
P0 := Kas2(0)
# Начальная точка на большой окружности
P0 = [80.1018; 58.84]
P(t) := Pm(t)*P0  # Точка на большой окружности в момент t
β(t) := acos((Kas2(t) - O2(t))*(P(t) - O2(t))/(|Kas2(t) - O2(t)|*|P(t) - O2(t)|))
α(10) = 1.58562
β(10) = 2.59808
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l(t) := d(t) + |α(t)|*30 + β(t - π*trunc(t/π))*90 + β(π)*90*trunc(t/π)  # Длина наматываемого на большой круг ремня
l(2*π) - l(0) = 547.475
l(4*π) - l(2*π) = 547.475
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γ(t) := l(t)/30  # Угол поворота малого круга
e1 := [1; 0]
r := 24
# параметры крепления карандаша
e1 := [1; 0]
l2 := 200
l3 := 150
α1 := π/3
Pm1(t) := Pm(-t)*e1*r + O1
Pm0 := [-95; -(230 - 75) + 15]
Pm0 = [-95; -140]
Pm1Pm0(t) := Pm0 - Pm1(t)
Pm3(t) := Pm1(t) + Pm1Pm0(t)*l2/|Pm1Pm0(t)|
Pm3(0) = [-55.6073; -137.528]
Pp(t) := Pm(α1)*(-Pm1Pm0(t))*l3/|Pm1Pm0(t)| + Pm3(t)
Pm1Pm0(0) = [-239; -15]
Ppf(t) := Pm(t)*Pp(-γ(t))
x := 0, 0.01 .. 200
combin(6, 2) = 15
